*Heading
** Job name: Job-1 Model name: Model-1
** Generated by: Abaqus/CAE 2016
*Preprint, echo=NO, model=NO, history=NO, contact=NO
**
** PARTS
**
*Part, name=sattelit
*End Part
**
**
** ASSEMBLY
**
*Assembly, name=Assembly
**
*Instance, name=sattelit-1, part=sattelit
*Node
      1, 0.0700000003, -0.00200000009, -0.0700000003
      2, 0.0700000003, -0.00200000009, 0.0700000003
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*Element, type=C3D10
  1,   38,  204,  102,  101,  222,  221,  220,  224,  223,  225
  2,   37,  102,   51,  124,  228,  227,  226,  230,  229,  231
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*Nset, nset=Set-1, generate
    1,  1170,     1
*Elset, elset=Set-1, generate
   1,  514,    1
** Section: Section-1
*Solid Section, elset=Set-1, material=Material-1
,
*End Instance
**
*End Assembly
**
** MATERIALS
**
*Material, name=Material-1
*Density
1190.,
*Elastic
 3.3e+09, 0.36
** ----------------------------------------------------------------
**
** STEP: Step-1
**
*Step, name=Step-1, nlgeom=NO
*Static
1., 1., 1e-05, 1.
**
** OUTPUT REQUESTS
**
*Restart, write, frequency=0
**
** FIELD OUTPUT: F-Output-1
**
*Output, field, variable=PRESELECT
**
** HISTORY OUTPUT: H-Output-1
**
*Output, history, variable=PRESELECT
*End Step
*Step, name=Step-2, nlgeom=NO
** modified Inputfile -> Export MASS and STIFFNESS matrices
** for export a consistent mass matrix MASS=CONSISTENT for lumped only MASS
*MATRIX GENERATE, STIFFNESS, MASS
*MATRIX OUTPUT, STIFFNESS, MASS, FORMAT=COORDINATE
*End Step
